<?xml version="1.0" ?>
<!-- $Id: dowty-rotol.xml,v 1.4 2009/05/28 15:53:58 vmmeazza Exp $ -->

<!--

  References :
  ==========

  - NACA Report 378

-->

<propeller name="dowty-rotol">

  <ixx> 20.405 </ixx>
  <diameter unit="IN"> 144.0 </diameter>
  <numblades> 6 </numblades>
  <gearratio> 2.22 </gearratio>
  <minrpm> 750 </minrpm>
  <maxrpm> 1200 </maxrpm>
  <minpitch> 0 </minpitch>
  <maxpitch> 45 </maxpitch>
<ct_factor>1.67</ct_factor>
<cp_factor>0.7</cp_factor>
  <table name="C_THRUST" type="internal">
    <tableData>
	0	15	30	45
0	0.1992	0.1803	0.1334	0.0655
0.1	0.1476	0.0969	0.0684	0.0333
0.2	0.1764	0.1225	0.0825	0.0436
0.3	0.1868	0.1389	0.0861	0.0484
0.4	0.1923	0.1471	0.0878	0.0522
0.5	0.1964	0.1532	0.0886	0.0552
0.6	0.2001	0.1588	0.0900	0.0573
0.7	0.2031	0.1640	0.0923	0.0586
0.8	0.2050	0.1692	0.0956	0.0593
0.9	0.2052	0.1745	0.1001	0.0592
1	0.2032	0.1802	0.1057	0.0585
1.1	0.1985	0.1861	0.1116	0.0573
1.2	0.1913	0.1921	0.1174	0.0555
1.3	0.1814	0.1983	0.1234	0.0533
1.4	0.1691	0.2052	0.1297	0.0509
1.5	0.1550	0.2124	0.1363	0.0488
1.6	0.1396	0.2195	0.1433	0.0482
1.7	0.1229	0.2256	0.1507	0.0493
1.8	0.1053	0.2301	0.1583	0.0522
1.9	0.0867	0.2324	0.1661	0.0573
2	0.0673	0.2327	0.1741	0.0630
    </tableData>
  </table>

  <table name="C_POWER" type="internal">
    <tableData>
	0	15	30	45
0	0.3155	0.5386	0.8294	1.0632
0.1	0.2617	0.2964	0.3076	0.2998
0.2	0.2954	0.3803	0.3888	0.3725
0.3	0.2958	0.4371	0.4234	0.4067
0.4	0.3008	0.4606	0.4465	0.4368
0.5	0.3068	0.4785	0.4690	0.4654
0.6	0.3137	0.4930	0.4936	0.4933
0.7	0.3212	0.5039	0.5212	0.5211
0.8	0.3285	0.5117	0.5523	0.5491
0.9	0.3348	0.5186	0.5880	0.5773
1	0.3391	0.5254	0.6285	0.6061
1.1	0.3401	0.5342	0.6732	0.6355
1.2	0.3375	0.5445	0.7194	0.6655
1.3	0.3316	0.5568	0.7624	0.6963
1.4	0.3216	0.5718	0.8003	0.7282
1.5	0.3077	0.5902	0.8322	0.7626
1.6	0.2900	0.6106	0.8584	0.7864
1.7	0.2684	0.6313	0.8802	0.8326
1.8	0.2429	0.6505	0.9008	0.8874
1.9	0.2134	0.6667	0.9226	0.9517
2	0.1798	0.6799	0.9451	1.0221
    </tableData>
  </table>
</propeller>
